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/batch
! ANSYS input file written by Workbench version 2026 R1
! File used for geometry attach: C:\Users\samue\OSR\OSR_cases\geometry\bracket_files\dp0\SYS-8\DM\SYS-8.dsco
/title,bracket--Static Structural 4 (B5)
/com,--- Data in consistent MKS units. See Solving Units in the help system for more information.
/units,MKS
/prep7
! Turn off shape checking because checks already performed inside WB mesher.
! See help system for more information.
SHPP,OFF,,NOWARN
etcon,set             ! allow ANSYS to choose best KEYOP's for 180x elements, resets any applicable keyopt to MAPDL defaults
/com,*********** Send User Defined Coordinate System(s) ***********
local,12,0,-7.67969527968774e-002,5.30351399374945e-004,2.42352146365666e-002,0.,-41.4984183559143,0.
local,13,0,-5.97407971429473e-002,-1.2896865742819e-002,7.11240283572912e-002,0.,0.,0.
local,14,0,-8.8315799832344e-002,-1.2896865742819e-002,7.11240283572912e-002,0.,0.,0.
local,15,0,-1.49120969024332e-014,-2.59363010035833e-002,2.8184792017894e-002,0.,0.,0.
local,16,0,-1.51177743898578e-014,2.60023871934311e-003,2.93919873098656e-003,0.,0.,0.
local,17,0,-0.148056600000016,-2.25689892214087e-002,2.52058121173634e-002,0.,0.,0.
local,18,0,-0.148056600000015,1.64309482826372e-002,-9.29649884072313e-003,0.,0.,0.
csys,0
/com,*********** Nodes for the whole assembly ***********
nblock,3,,111202
(1i9,3e20.9e3)
        1    -1.560576000E-01    -1.996875065E-02     2.814501068E-02
        2    -1.547874695E-01    -2.320856296E-02     3.101119504E-02
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-1
/com,*********** Nodes for all Remote Points ***********
nblock,3
(1i9,3e20.9e3)
   101094    -7.402821327E-02    -1.289657708E-02     7.112421204E-02
   101095    -7.402821327E-02    -1.289657708E-02     7.112421204E-02
   101096    -7.402821327E-02    -1.289657708E-02     7.112421204E-02
   101097    -7.402821327E-02    -1.289657708E-02     7.112421204E-02
-1
/com,*********** Elements for Body 1 'SYS-8\a279837B8p1l' ***********
et,1,187
MAT,1 $ TYPE,1 $ REAL,1 $ SECNUM,1 $ ESYS,0    ! ELEMNODES = 10
eblock,21,COMPACT,,68804
(21i9)
        1      464    13792      465     3950    17552    17560    17548    17551    43100    17558
        2       86     1422     5565     1440    14557    24950    14562    14558    24946    25090
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-1
secnum,1    ! reset the section ID to default
et,2,186
keyo,2,2,1          ! set full integration on SOLID186
MAT,1 $ TYPE,2 $ REAL,1 $ SECNUM,1 $ ESYS,0    ! ELEMNODES = 20
eblock,21,COMPACT,,664
(21i9)
    68805     1594     1708     1595     1595    13681    13524    13680    13680    25992    25997     1595    25991   100334   100333    13680   100911    25994    26363    25998    25998
    68806     1539     1659     1660     1660    13732    13573    13572    13572    25761    26264     1660    25762   100580   100572    13572   100576    25763    26265    26267    26267
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-1
secnum,1    ! reset the section ID to default
toffst,273.15,      ! Temperature offset from absolute zero
/com,*********** Set Reference Temperature ***********
tref,22.
/com,*********** Send Materials ***********
Temperature = 'TEMP' ! Temperature
MP,DENS,1,7850,	! kg m^-3
MP,ALPX,1,1.2e-05,	! C^-1
MP,C,1,434,	! J kg^-1 C^-1
MP,KXX,1,60.5,	! W m^-1 C^-1
MP,RSVX,1,1.7e-07,	! kg m^3 A^-2 s^-3
MP,EX,1,200000000000,	! Pa
MP,NUXY,1,0.3,
MP,MURX,1,10000,

!************************* Model Summary ********************
! SYS-8\a279837B8p1l,	Structural Steel,	matid,	1
!************************* End Model Summary ********************
CMBLOCK,SELECTION,ELEM,        1
(8i10)
      1104
CMBLOCK,SELECTION_2,ELEM,        2
(8i10)
      4123      5416
CMBLOCK,SELECTION_3,ELEM,        1
(8i10)
      5416
CMBLOCK,SELECTION_5,NODE,      503
(8i10)
       424       511       598       630      -690       889       940       947
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CMBLOCK,SELECTION_6,NODE,        1
(8i10)
        34
/com,*********** Fixed Supports ***********
CMBLOCK,_FIXEDSU,NODE,      634
(8i10)
        26       -42        58       -74       100      -133       174      -207
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cmsel,s,_FIXEDSU
d,all,all
nsel,all
/com,*********** Create Remote Point "Internal Remote Point 2" ***********
! -------- Remote Point Used by "horizontal" --------
*set,tid,4
*set,cid,3
et,cid,174
et,tid,170
keyo,tid,2,1               ! Don't fix the pilot node
keyo,tid,4,111111
keyo,cid,12,5              ! Bonded Contact
keyo,cid,4,1               ! Deformable RBE3 style load
keyo,cid,2,2               ! MPC style contact
MAT,3 $ TYPE,3 $ REAL,3 $ SECNUM,3 $ ESYS,0    ! ELEMNODES = 8
eblock,21,COMPACT,,976
(21i9)
    76621      379      380     1725     1725    16927    16935     1725    16929
    76622      381      382     1727     1727    16940    16948     1727    16942
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-1
secnum,1    ! reset the section ID to default
*set,_npilot,101095
_npilot153=_npilot
type,tid
mat ,cid
real,cid
tshape,pilo
en,77597,_npilot
tshape
csys,12
nrot,101095
csys,0
/com,*********** Construct Remote Force ***********
fini
/com,****************************************************************************
/com,*************************    SOLUTION       ********************************
/com,****************************************************************************
/solu
antype,0                   ! static analysis
_thickRatio=  1     ! Ratio of thick parts in the model
eqsl,pcg,1e-8,,,,,,1
cntr,print,1               ! print out contact info and also make no initial contact an error
cncheck,dmp		!	Enable program controlled contact splitting for distributed memory parallel run
dmpoption,emat,no             ! Don't combine emat file for DANSYS
dmpoption,esav,no             ! Don't combine esav file for DANSYS
nldiag,cont,iter           ! print out contact info each equilibrium iteration
rescontrol,,none                 ! Do not keep any restart files
/com,****************************************************
/com,******************* SOLVE FOR LS 1 OF 1 ****************
f,101095,fx,0.
f,101095,fy,-37810.
f,101095,fz,0.
nsub,1,1,1
time,1.
outres,erase
outres,all,none
outres,nsol,all,
outres,rsol,all
outres,eangl,all
outres,etmp,all
outres,veng,all
outres,strs,all,
outres,epel,all,
outres,eppl,all,
outres,cont,all,
! ****** Begin Command Snippet ******
!   Commands inserted into this file will be executed just prior to the ANSYS SOLVE command.
!   These commands may supersede command settings set by Workbench.

!   Active UNIT system in Workbench when this object was created:  Metric (mm, t, N, s, mV, mA)
!   NOTE:  Any data that requires units (such as mass) is assumed to be in the consistent solver unit system.
!                See Solving Units in the help system for more information.

ERESX, NO

! ****** End   Command Snippet ******
! *********** WB SOLVE COMMAND ***********
! check interactive state
*get,ANSINTER_,active,,int
*if,ANSINTER_,ne,0,then
/eof
*endif
solve
/com *************** Write FE CONNECTORS *********
CEWRITE,file,ce,,INTE
/com,****************************************************
/com,*************** FINISHED SOLVE FOR LS 1 *************
fini
*get,_NSOLTHREADS,active,0,ntfs
*get,_NSOLPROCESSES,active,0,npfs
*get,_PCGITER,active,,solu,cgiter
/post1
! ****** Begin Command Snippet ******
!   Commands inserted into this file will be executed immediately after the ANSYS /POST1 command.

!   Active UNIT system in Workbench when this object was created:  Metric (mm, t, N, s, mV, mA)
!   NOTE:  Any data that requires units (such as mass) is assumed to be in the consistent solver unit system.
!                See Solving Units in the help system for more information.

/POST1
SET, LAST
/POST1
SET, LAST
RSYS, 0
AVRES, , NOAV

! Sélection PLANE183 uniquement
ESEL, S, ENAME, , 187
*GET, nb_elem, ELEM, , COUN

! Construction de la liste des IDs d'éléments (parcours fiable)
*DIM, EID_LIST, ARRAY, nb_elem
*GET, e_tmp, ELEM, , NUM, MIN
EID_LIST(1) = e_tmp
*DO, ie, 2, nb_elem
    *GET, e_tmp, ELEM, e_tmp, NXTH
    EID_LIST(ie) = e_tmp
*ENDDO

! Allocations : 4 nœuds-coins par élément
nb_pts=nb_elem*4
*DIM, A_EID, ARRAY, nb_pts
*DIM, A_NID, ARRAY, nb_pts
*DIM, A_CX,  ARRAY, nb_pts
*DIM, A_CY,  ARRAY, nb_pts
*DIM, A_CZ,  ARRAY, nb_pts
*DIM, A_SX,  ARRAY, nb_pts
*DIM, A_SY,  ARRAY, nb_pts
*DIM, A_SZ,  ARRAY, nb_pts
*DIM, A_SXY, ARRAY, nb_pts
*DIM, A_SYZ, ARRAY, nb_pts
*DIM, A_SXZ, ARRAY, nb_pts

! Boucle : pour chaque élément, isoler puis extraire les 4 coins
*DO, ie, 1, nb_elem
    eid_cur = EID_LIST(ie)

    ! Isoler cet élément seul -> pas de moyennage possible
    ESEL, S, ELEM, , eid_cur

    *DO, k, 1, 4
        *GET, nid, ELEM, eid_cur, NODE, k
        idx = (ie-1)*4 + k

        A_EID(idx) = eid_cur
        A_NID(idx) = nid

        *GET, A_CX(idx), NODE, nid, LOC, X
        *GET, A_CY(idx), NODE, nid, LOC, Y
        *GET, A_CZ(idx), NODE, nid, LOC, Z

        *GET, A_SX(idx),  NODE, nid, S, X
        *GET, A_SY(idx),  NODE, nid, S, Y
        *GET, A_SZ(idx),  NODE, nid, S, Z
        *GET, A_SXY(idx), NODE, nid, S, XY
        *GET, A_SYZ(idx), NODE, nid, S, YZ
        *GET, A_SXZ(idx), NODE, nid, S, XZ
    *ENDDO
*ENDDO

! Re-sélection complète et écriture
ALLSEL, ALL

*CFOPEN,'C:\Users\samue\OSR\shared\sigma_export_nodes_horizontal', txt
*VLEN, nb_pts
*VWRITE, A_EID(1), A_NID(1), A_CX(1), A_CY(1), A_CZ(1), A_SX(1), A_SY(1), A_SZ(1), A_SXY(1), A_SYZ(1), A_SXZ(1)
(F8.0, F8.0, 3E14.6, 6E14.6)
*CFCLOS

!/SYS, C:\Users\lukas\OSR\OSR_model\run_pipeline.bat
! ****** End   Command Snippet ******
fini
