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/batch
! ANSYS input file written by Workbench version 2026 R1
! File used for geometry attach: C:\Users\samue\OSR\OSR_cases\geometry\bracket_files\dp0\SYS-8\DM\SYS-8.dsco
/title,bracket--Static Structural (B5)
/com,--- Data in consistent MKS units. See Solving Units in the help system for more information.
/units,MKS
/prep7
! Turn off shape checking because checks already performed inside WB mesher.
! See help system for more information.
SHPP,OFF,,NOWARN
etcon,set             ! allow ANSYS to choose best KEYOP's for 180x elements, resets any applicable keyopt to MAPDL defaults
/com,*********** Send User Defined Coordinate System(s) ***********
local,12,0,-7.67969527968774e-002,5.30351399374945e-004,2.42352146365666e-002,0.,-41.4984183559143,0.
local,13,0,-5.97407971429473e-002,-1.2896865742819e-002,7.11240283572912e-002,0.,0.,0.
local,14,0,-8.8315799832344e-002,-1.2896865742819e-002,7.11240283572912e-002,0.,0.,0.
local,15,0,-1.49120969024332e-014,-2.59363010035833e-002,2.8184792017894e-002,0.,0.,0.
local,16,0,-1.51177743898578e-014,2.60023871934311e-003,2.93919873098656e-003,0.,0.,0.
local,17,0,-0.148056600000016,-2.25689892214087e-002,2.52058121173634e-002,0.,0.,0.
local,18,0,-0.148056600000015,1.64309482826372e-002,-9.29649884072313e-003,0.,0.,0.
csys,0
/com,*********** Nodes for the whole assembly ***********
nblock,3,,13831
(1i9,3e20.9e3)
        1    -1.560576000E-01    -1.996875065E-02     2.814501068E-02
        2    -1.547874695E-01    -2.320856296E-02     3.101119504E-02
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-1
/com,*********** Nodes for all Remote Points ***********
nblock,3
(1i9,3e20.9e3)
    12575    -7.402821327E-02    -1.289657708E-02     7.112421204E-02
-1
/com,*********** Elements for Body 1 'SYS-8\a279837B8p1l' ***********
et,1,187
MAT,1 $ TYPE,1 $ REAL,1 $ SECNUM,1 $ ESYS,0    ! ELEMNODES = 10
eblock,21,COMPACT,,6846
(21i9)
        1      332      983      363     2051     4368     4592     4363     4370     7781     4595
        2      344      964     2051     2044     4456     7735     4460     4459     7734    12574
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-1
secnum,1    ! reset the section ID to default
toffst,273.15,      ! Temperature offset from absolute zero
/com,*********** Set Reference Temperature ***********
tref,22.
/com,*********** Send Materials ***********
Temperature = 'TEMP' ! Temperature
MP,DENS,1,7850,	! kg m^-3
MP,ALPX,1,1.2e-05,	! C^-1
MP,C,1,434,	! J kg^-1 C^-1
MP,KXX,1,60.5,	! W m^-1 C^-1
MP,RSVX,1,1.7e-07,	! kg m^3 A^-2 s^-3
MP,EX,1,200000000000,	! Pa
MP,NUXY,1,0.3,
MP,MURX,1,10000,

!************************* Model Summary ********************
! SYS-8\a279837B8p1l,	Structural Steel,	matid,	1
!************************* End Model Summary ********************
CMBLOCK,SELECTION_2,ELEM,        2
(8i10)
      4123      5416
CMBLOCK,SELECTION_3,ELEM,        1
(8i10)
      5416
CMBLOCK,SELECTION_5,NODE,       54
(8i10)
       354      -366       519       568       571       591       974      -986
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CMBLOCK,SELECTION_6,NODE,        1
(8i10)
        34
/com,*********** Fixed Supports ***********
CMBLOCK,_FIXEDSU,NODE,      128
(8i10)
        26       -32        48       -54        80       -93       134      -147
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cmsel,s,_FIXEDSU
d,all,all
nsel,all
/com,*********** Create Remote Point "Internal Remote Point" ***********
! -------- Remote Point Used by "Remote Force" --------
*set,tid,3
*set,cid,2
et,cid,174
et,tid,170
keyo,tid,2,1               ! Don't fix the pilot node
keyo,tid,4,111111
keyo,cid,12,5              ! Bonded Contact
keyo,cid,4,1               ! Deformable RBE3 style load
keyo,cid,2,2               ! MPC style contact
MAT,2 $ TYPE,2 $ REAL,2 $ SECNUM,2 $ ESYS,0    ! ELEMNODES = 8
eblock,21,COMPACT,,104
(21i9)
    10090      276      896      302      302     3981     4157      302     3979
    10091      908      302      922      922     4158     4161      922     7574
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-1
secnum,1    ! reset the section ID to default
*set,_npilot,12575
_npilot148=_npilot
type,tid
mat ,cid
real,cid
tshape,pilo
en,10194,_npilot
tshape
csys,12
nrot,12575
csys,0
/com,*********** Construct Remote Force ***********
fini
/com,****************************************************************************
/com,*************************    SOLUTION       ********************************
/com,****************************************************************************
/solu
antype,0                   ! static analysis
_thickRatio=  1     ! Ratio of thick parts in the model
eqsl,pcg,1e-8,,,,,,1
cntr,print,1               ! print out contact info and also make no initial contact an error
cncheck,dmp		!	Enable program controlled contact splitting for distributed memory parallel run
dmpoption,emat,no             ! Don't combine emat file for DANSYS
dmpoption,esav,no             ! Don't combine esav file for DANSYS
nldiag,cont,iter           ! print out contact info each equilibrium iteration
rescontrol,,none                 ! Do not keep any restart files
/com,****************************************************
/com,******************* SOLVE FOR LS 1 OF 1 ****************
f,12575,fx,0.
f,12575,fy,0.
f,12575,fz,35586.
nsub,1,1,1
time,1.
outres,erase
outres,all,none
outres,nsol,all,
outres,rsol,all
outres,eangl,all
outres,etmp,all
outres,veng,all
outres,strs,all,
outres,epel,all,
outres,eppl,all,
outres,cont,all,
! ****** Begin Command Snippet ******
!   Commands inserted into this file will be executed just prior to the ANSYS SOLVE command.
!   These commands may supersede command settings set by Workbench.

!   Active UNIT system in Workbench when this object was created:  Metric (mm, t, N, s, mV, mA)
!   NOTE:  Any data that requires units (such as mass) is assumed to be in the consistent solver unit system.
!                See Solving Units in the help system for more information.


ERESX, NO
! ****** End   Command Snippet ******
! *********** WB SOLVE COMMAND ***********
! check interactive state
*get,ANSINTER_,active,,int
*if,ANSINTER_,ne,0,then
/eof
*endif
solve
/com *************** Write FE CONNECTORS *********
CEWRITE,file,ce,,INTE
/com,****************************************************
/com,*************** FINISHED SOLVE FOR LS 1 *************
fini
*get,_NSOLTHREADS,active,0,ntfs
*get,_NSOLPROCESSES,active,0,npfs
*get,_PCGITER,active,,solu,cgiter
/post1
! ****** Begin Command Snippet ******
! ---------------------------------------------------------------------------
! OSR stress export block - paste this into a Commands (APDL) object placed
! under Solution in Mechanical.
!
! The export folder below MUST be the 'shared' folder of THIS machine's OSR
! checkout. APDL has no way of discovering it, so it is written out in full.
! Running  python configure_osr.py  from the OSR root rewrites both *CFOPEN
! lines with the correct local path.
! ---------------------------------------------------------------------------
/POST1
SET,LAST
RSYS,0
AVRES,,NO

! marker to signal to the pipeline that the APDl has run
*CFOPEN,apdl_marker,txt,C:\Users\samue\OSR\shared
*VWRITE
('APDL Commands block executed')
*CFCLOS

ALLSEL,ALL
ESEL,S,ENAME,,187
*GET,nb_elem,ELEM,0,COUNT

*CFOPEN,sigma_export_nodes_testBracket,txt,C:\Users\samue\OSR\shared
*VWRITE
('# eid nid X Y Z SXX SYY SZZ SXY SYZ SXZ')
(A)

eid_cur = 0
*DO,ie,1,nb_elem
    ! advance to the next element in the 187 selection
    *GET,eid_cur,ELEM,eid_cur,NXTH
    *IF,eid_cur,LE,0,EXIT

    ! isolate this element to read its own Gauss-to-node values
    ESEL,S,ELEM,,eid_cur

    *DO,k,1,4
        *GET,nid,ELEM,eid_cur,NODE,k
        *IF,nid,GT,0,THEN
            *GET,cx,NODE,nid,LOC,X
            *GET,cy,NODE,nid,LOC,Y
            *GET,cz,NODE,nid,LOC,Z
            *GET,sx, NODE,nid,S,X
            *GET,sy, NODE,nid,S,Y
            *GET,sz, NODE,nid,S,Z
            *GET,sxy,NODE,nid,S,XY
            *GET,syz,NODE,nid,S,YZ
            *GET,sxz,NODE,nid,S,XZ
            *VWRITE,eid_cur,nid,cx,cy,cz,sx,sy,sz,sxy,syz,sxz
            (F8.0,F8.0,3E14.6,6E14.6)
        *ENDIF
    *ENDDO

    ! restore the 187 selection so the next NXTH works properly
    ESEL,S,ENAME,,187
*ENDDO
*CFCLOS
ALLSEL,ALL

! ****** End   Command Snippet ******
fini
