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/COM,ANSYS RELEASE 2026 R1.03        BUILD 26.1      UP20260202       11:32:58
/PREP7
/TITLE,bracket--Static Structural (B5)
ANTYPE, 0
EQSLV,PCG , 1.000000000E-08,,
TOFFST,  273.150000
DMPOPT,ESAV,NO
DMPOPT,EMAT,NO
*IF,_CDRDOFF,EQ,1,THEN     !if solid model was read in
_CDRDOFF=             !reset flag, numoffs already performed
*ELSE              !offset database for the following FE model
NUMOFF,NODE,    34905
NUMOFF,ELEM,    27923
NUMOFF,MAT ,        1
NUMOFF,REAL,        2
NUMOFF,TYPE,        3
NUMOFF,CSYS,       18
*ENDIF
*SET,ANSINTER_,  0.000000000000
*SET,CID     ,  2.000000000000
*SET,CX      ,-0.6438186821000E-01
*SET,CY      ,-0.4919659224000E-02
*SET,CZ      , 0.4864649915000E-01
*SET,EID_CUR ,  20323.00000000
*SET,IE      ,  20323.00000000
*SET,K       ,  4.000000000000
*SET,NB_ELEM ,  20323.00000000
*SET,NID     ,  1842.000000000
*SET,SX      ,  125539064.0000
*SET,SXY     ,  18317206.00000
*SET,SXZ     ,  102192816.0000
*SET,SY      ,  1833206.875000
*SET,SYZ     ,  33696080.00000
*SET,SZ      ,  174503856.0000
*SET,TEMPERATURE,'TEMP                            '
*SET,TID     ,  3.000000000000
*SET,_ASMDIAG, 0.2296646647043
*SET,_DS_PROGRESS,  999.0000000000
*SET,_MAXELEMNUM,  27923.00000000
*SET,_MAXELEMTYPE,  3.000000000000
*SET,_MAXNODENUM,  34905.00000000
*SET,_MAXREALCONST,  2.000000000000
*SET,_NPILOT ,  34904.00000000
*SET,_NPILOT148,  34904.00000000
*SET,_NSOLPROCESSES,  4.000000000000
*SET,_NSOLTHREADS,  1.000000000000
*SET,_NUMELEM,  20460.00000000
*SET,_NUMNODE,  34904.00000000
*SET,_PCGITER,  121.0000000000
*SET,_RETURN ,  0.000000000000
*SET,_STATUS ,  0.000000000000
*SET,_THICKRATIO,  1.000000000000
*SET,_WALLASOL, 0.2051954694444E-02
*SET,_WALLBSOL, 0.1383200611111E-02
*SET,_WALLSTRT, 0.1352995805556E-02
*SET,_WB_PROJECTSCRATCH_DIR(1,       1,       1),'C:\Users\samue\OSR\OSR_cases\geometry\_ProjectScratch\Scr2B29\                                                                                                                                                                                          '
*SET,_WB_SOLVERFILES_DIR(1,       1,       1),'C:\Users\samue\OSR\OSR_cases\geometry\bracket_files\dp0\SYS-8\MECH\                                                                                                                                                                                     '
*SET,_WB_USERFILES_DIR(1,       1,       1),'C:\Users\samue\OSR\OSR_cases\geometry\bracket_files\user_files\                                                                                                                                                                                         '
*SET,_XMAX   , 0.1524000000000E-01
*SET,_XMIN   ,-0.1632966000000
*SET,_YMAX   , 0.4770888003000E-01
*SET,_YMIN   ,-0.4443960546000E-01
*SET,_ZMAX   , 0.8890402378000E-01
*SET,_ZMIN   ,-0.2235781737000E-01
DOF,DELETE
ETBLOCK,        3,        3
(2i9,19a9)
        1      187        0        0        0        0        0        0        0        0        0        0        0        0        0        0        0        0        0        0        0
        2      174        0        2        0        1        0        0        0        0        0        0        0        5        0        0        0        0        0        0        0
        3      170        0        1        0   111111        0        0        0        0        0        0        0        0        0        0        0        0        0        0        0
       -1
DOF,ROTX,ROTY,ROTZ,
LOCAL,UNBL,LOC,      12, 0,-7.679695280E-02, 5.303513994E-04, 2.423521464E-02
LOCAL,UNBL,ANG,      12, 0,  0.00000000    , -41.4984184    ,  0.00000000
LOCAL,UNBL,PRM,      12, 0,  1.00000000    ,  1.00000000
CSCIR,      12,       0,       0
LOCAL,UNBL,LOC,      13, 0,-5.974079714E-02,-1.289686574E-02, 7.112402836E-02
LOCAL,UNBL,ANG,      13, 0,  0.00000000    ,  0.00000000    ,  0.00000000
LOCAL,UNBL,PRM,      13, 0,  1.00000000    ,  1.00000000
CSCIR,      13,       0,       0
LOCAL,UNBL,LOC,      14, 0,-8.831579983E-02,-1.289686574E-02, 7.112402836E-02
LOCAL,UNBL,ANG,      14, 0,  0.00000000    ,  0.00000000    ,  0.00000000
LOCAL,UNBL,PRM,      14, 0,  1.00000000    ,  1.00000000
CSCIR,      14,       0,       0
LOCAL,UNBL,LOC,      15, 0,-1.491209690E-14,-2.593630100E-02, 2.818479202E-02
LOCAL,UNBL,ANG,      15, 0,  0.00000000    ,  0.00000000    ,  0.00000000
LOCAL,UNBL,PRM,      15, 0,  1.00000000    ,  1.00000000
CSCIR,      15,       0,       0
LOCAL,UNBL,LOC,      16, 0,-1.511777439E-14, 2.600238719E-03, 2.939198731E-03
LOCAL,UNBL,ANG,      16, 0,  0.00000000    ,  0.00000000    ,  0.00000000
LOCAL,UNBL,PRM,      16, 0,  1.00000000    ,  1.00000000
CSCIR,      16,       0,       0
LOCAL,UNBL,LOC,      17, 0,-0.148056600    ,-2.256898922E-02, 2.520581212E-02
LOCAL,UNBL,ANG,      17, 0,  0.00000000    ,  0.00000000    ,  0.00000000
LOCAL,UNBL,PRM,      17, 0,  1.00000000    ,  1.00000000
CSCIR,      17,       0,       0
LOCAL,UNBL,LOC,      18, 0,-0.148056600    , 1.643094828E-02,-9.296498841E-03
LOCAL,UNBL,ANG,      18, 0,  0.00000000    ,  0.00000000    ,  0.00000000
LOCAL,UNBL,PRM,      18, 0,  1.00000000    ,  1.00000000
CSCIR,      18,       0,       0
CSYS,   0
MAT ,        2
TYPE,        3
REAL,        2
NBLOCK,6,SOLID,     34905,     34905
(3i9,6e21.13e3)
        1        0        0-1.5605760000000E-001-1.9968750650000E-002 2.8145010680000E-002
        2        0        0-1.5551731030000E-001-2.2133506180000E-002 3.0060118050000E-002
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N,UNBL,LOC,       -1,
EBLOCK,19,SOLID,     27923,     20460
(19i10)
         1         1         1         1         0         0         0         0        10         0         1      4303      5421      4827      5055     30614     33306     30607     30611
     34562     33303
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        -1
CMBLOCK,SELECTION_2,ELEM,       2  ! users element component definition
(8i10)
      4123      5416
CMBLOCK,SELECTION_3,ELEM,       1  ! users element component definition
(8i10)
      5416
CMBLOCK,SELECTION_5,NODE,      88  ! users node component definition
(8i10)
       438       445       470       477       524       531       556       563
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CMBLOCK,SELECTION_6,NODE,       1  ! users node component definition
(8i10)
        34
CMBLOCK,_FIXEDSU,NODE,     279  ! users node component definition
(8i10)
        41       -52        78       -89       130      -151       217      -238
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RLBLOCK,       1,       2,      48,       7
(2i8,6g16.9)
(7g16.9)
       2      45  0.00000000      0.00000000      0.00000000      0.00000000      0.00000000      0.00000000
  0.00000000      0.00000000      0.00000000      0.00000000      0.00000000      0.00000000      0.00000000
  0.00000000      0.00000000      0.00000000      0.00000000      0.00000000      0.00000000      0.00000000
  0.00000000      0.00000000      0.00000000      0.00000000      0.00000000      0.00000000      0.00000000
  0.00000000      0.00000000      0.00000000      0.00000000      0.00000000      0.00000000      0.00000000
  0.00000000      0.00000000      0.00000000      0.00000000      0.00000000      0.00000000      0.00000000
  0.00000000      0.00000000      0.00000000     -1.00000000
MPTEMP,UNBL, 1, 1,  0.00000000    ,
MPDATA,UNBL, 1,EX  ,       1, 1, 2.000000000E+11,
MPTEMP,UNBL, 1, 1,  0.00000000    ,
MPDATA,UNBL, 1,NUXY,       1, 1, 0.300000000    ,
MPTEMP,UNBL, 1, 1,  0.00000000    ,
MPDATA,UNBL, 1,ALPX,       1, 1, 1.200000000E-05,
MPTEMP,UNBL, 1, 1,  0.00000000    ,
MPDATA,UNBL, 1,DENS,       1, 1,  7850.00000    ,
MPTEMP,UNBL, 1, 1,  0.00000000    ,
MPDATA,UNBL, 1,KXX ,       1, 1,  60.5000000    ,
MPTEMP,UNBL, 1, 1,  0.00000000    ,
MPDATA,UNBL, 1,RSVX,       1, 1, 1.700000000E-07,
MPTEMP,UNBL, 1, 1,  0.00000000    ,
MPDATA,UNBL, 1,C   ,       1, 1,  434.000000    ,
MPTEMP,UNBL, 1, 1,  0.00000000    ,
MPDATA,UNBL, 1,MURX,       1, 1,  10000.0000    ,
MPTEMP,UNBL,16, 1,  1.00000000    ,  2.00000000    ,  3.00000000
MPTEMP,UNBL,16, 4,  4.00000000    ,  5.00000000    ,  6.00000000
MPTEMP,UNBL,16, 7,  7.00000000    ,  8.00000000    ,  9.00000000
MPTEMP,UNBL,16,10,  10.0000000    ,  11.0000000    ,  12.0000000
MPTEMP,UNBL,16,13,  13.0000000    ,  14.0000000    ,  15.0000000
MPTEMP,UNBL,16,16,  16.0000000    ,
MPDATA,UNBL,16,UMID,       1, 1, 892940336.0    , 845231929.0    , 758591843.0
MPDATA,UNBL,16,UMID,       1, 4, 841823282.0    , 946154809.0    , 808870445.0
MPDATA,UNBL,16,UMID,       1, 7, 892691511.0    , 1684170085.    , 825241701.0
MPDATA,UNBL,16,UMID,       1,10, 538976288.0    , 538976288.0    , 538976288.0
MPDATA,UNBL,16,UMID,       1,13, 538976288.0    , 538976288.0    , 538976288.0
MPDATA,UNBL,16,UMID,       1,16, 538976288.0    ,
MPTEMP,UNBL,16, 1,  1.00000000    ,  2.00000000    ,  3.00000000
MPTEMP,UNBL,16, 4,  4.00000000    ,  5.00000000    ,  6.00000000
MPTEMP,UNBL,16, 7,  7.00000000    ,  8.00000000    ,  9.00000000
MPTEMP,UNBL,16,10,  10.0000000    ,  11.0000000    ,  12.0000000
MPTEMP,UNBL,16,13,  13.0000000    ,  14.0000000    ,  15.0000000
MPTEMP,UNBL,16,16,  16.0000000    ,
MPDATA,UNBL,16,UVID,       1, 1, 828782905.0    , 1664640566.    , 758669924.0
MPDATA,UNBL,16,UVID,       1, 4, 1647129648.    , 859385145.0    , 959603757.0
MPDATA,UNBL,16,UVID,       1, 7, 892822835.0    , 1664104290.    , 809054520.0
MPDATA,UNBL,16,UVID,       1,10, 538976288.0    , 538976288.0    , 538976288.0
MPDATA,UNBL,16,UVID,       1,13, 538976288.0    , 538976288.0    , 538976288.0
MPDATA,UNBL,16,UVID,       1,16, 538976288.0    ,
EXTOPT,ATTR,      0,      0,      0
EXTOPT,ESIZE,  0,  0.0000
EXTOPT,ACLEAR,      0
TREF,  22.0000000
IRLF,  0
BFUNIF,TEMP,_TINY
ACEL,  0.00000000    ,  0.00000000    ,  0.00000000
OMEGA,  0.00000000    ,  0.00000000    ,  0.00000000
DOMEGA,  0.00000000    ,  0.00000000    ,  0.00000000
CGLOC,  0.00000000    ,  0.00000000    ,  0.00000000
CGOMEGA,  0.00000000    ,  0.00000000    ,  0.00000000
DCGOMG,  0.00000000    ,  0.00000000    ,  0.00000000
NLDIAG,EFLG,OFF
NLDIAG,NRRE,OFF
NLDIAG,CONT,ITER

NSUBST,         1,         1,         1,
KUSE,     0
TIME,  1.00000000
ALPHAD,  0.00000000
BETAD,  0.00000000
DMPRAT,  0.00000000
DMPSTR,  0.00000000

CRPLIM, 0.100000000    ,   0
CRPLIM,  0.00000000    ,   1
NCNV,     1,  0.00000000    ,     0,  0.00000000    ,  0.00000000
NEQIT,     0

ERESX,NO
OUTRES, ALL,NONE,
OUTRES,NSOL, ALL,
OUTRES,RSOL, ALL,
OUTRES,EANG, ALL,
OUTRES,ETMP, ALL,
OUTRES,VENG, ALL,
OUTRES,STRS, ALL,
OUTRES,EPEL, ALL,
OUTRES,EPPL, ALL,
OUTRES,EPTH, ALL,
OUTRES,CONT, ALL,
DBLOCK,      1734
(i9,a6,2(pg16.9))
       41  UX    0.00000000      0.00000000
       41  UY    0.00000000      0.00000000
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       -1
FBLOCK,         3
(i9,a6,2(pg16.9))
    34904  FX    0.00000000      0.00000000
    34904  FY    0.00000000      0.00000000
    34904  FZ    100000.000      0.00000000
       -1
BFBLOCK,2,TEMP,     34905,     34905,0
(i9,6(pg20.9))
        1          0.00000000
        2     9.579480320E-09
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BF,end,LOC,       -1,
FINISH
